variable dt    index 0.001
variable tol   index 1.0e-7
variable rsh   index 5.0
variable kacc  index 1.0e-6
variable nrun  index 200000
variable tag   index d
variable seed  index 12345
units metal
atom_style full
boundary p p p
read_data eqS_${seed}.data
group fq type 1 2
pair_style hybrid/overlay lj/cut 10.0 coul/long 10.0 coul/shield/intra ${rsh} all
pair_coeff 1 1 lj/cut 0.01275 3.144
pair_coeff 1 2 lj/cut 0.0 1.0
pair_coeff 2 2 lj/cut 0.0 1.0
pair_coeff * * coul/long
pair_coeff * * coul/shield/intra 1.11
kspace_style pppm/samqeq ${kacc}
neighbor 2.0 bin
fix chg fq qeq/sam 1 0.0 10.0 ${tol} spcfq_expt.param
fix_modify chg recip_probes 16
fix_modify chg solver cg nofallback
fix_modify chg energy yes
timestep ${dt}
fix integ all rigid/nve/small molecule
thermo 100
thermo_style custom step temp pe etotal f_chg
run ${nrun}
