variable seed index 12345
units metal
atom_style full
boundary p p p
read_data eq.data
group fq type 1 2
pair_style hybrid/overlay lj/cut 10.0 coul/long 10.0 coul/shield/intra 5.0 all
pair_coeff 1 1 lj/cut 0.01275 3.144
pair_coeff 1 2 lj/cut 0.0 1.0
pair_coeff 2 2 lj/cut 0.0 1.0
pair_coeff * * coul/long
pair_coeff * * coul/shield/intra 1.11
kspace_style pppm/samqeq 1.0e-6
neighbor 2.0 bin
fix chg fq qeq/sam 1 0.0 10.0 1.0e-7 spcfq_expt.param
fix_modify chg recip_probes 16
fix_modify chg solver cg nofallback
timestep 0.001
velocity all create 298.0 ${seed} dist gaussian mom yes rot yes
fix integ all rigid/nvt/small molecule temp 298.0 298.0 0.1
thermo 5000
run 15000
write_data eqS_${seed}.data nocoeff
