# 13,216-atom Cu/ZnCl2(aq) cell in the conductor mode with MOBILE copper electrodes. As in.cucell_conductor (each electrode
# one fragment with the Gaussian self-energy, width 0.5 A; no ridge), but Cu-Cu is the Mendelev Cu2 (2012) EAM/FS potential
# (real-units conversion of ~/ff/EAM/Mendelev_Cu2_2012.eam.fs), the copper is integrated and thermostatted with the
# electrolyte instead of held fixed, and the Zn2+ ions leave the metal potential: Zn2+-Cu short range is an
# illustrative Lennard-Jones term taken equal to the Li+-Cu one (similar ionic radii), not a fitted potential.
# Benchmark deck for proc-grid optimization: reads data.cell_L0, steady 300 K, short run.
# Same physics/cost as the production relax/equil (FQ solve + rexpon + EAM + SHAKE), with the load
# balance the inhomogeneous slab+vacuum cell needs.  Reports Loop time / Performance (timesteps/s).
#   run: srun ... lmp_cpu -in in.cucell_bench -var NB 500 [-var GRID "* * 1"]
variable        NB     index 500
variable        RIDGE  index 69.1815
units           real
atom_style      full
boundary        p p p
comm_style      tiled                     # slab+vacuum -> RCB load balance
if "${GRID} != none" then "processors ${GRID}"
special_bonds   lj/coul 1.0e-8 1.0e-8 1.0
read_data       data.cell_L0_conductor.data extra/special/per/atom 2

group           water  type 1 2
group           watO   type 1
group           zn     type 3
group           cl     type 4
group           li     type 6
group           metal  type 7
group           ions   type 3 4 6
group           mobile type 1 2 3 4 6 7
group           FQ     type 1 2 3 5 7
set             type 1 charge -0.9
set             type 2 charge 0.45
set             group zn charge 2.0
set             group cl charge -1.0
set             group metal charge 0.0

pair_style      hybrid/overlay rexpon NULL lgvdw yes coulomb_off yes checkqeq no safezone 3.0 mincap 200 lj/cut 10.0 coul/long 10.0 coul/shield/intra 5.0 all gaussian eam/fs
pair_coeff      * * rexpon ffield.RexPoN Ow Hw NULL NULL NULL NULL NULL
pair_coeff      * * coul/long
pair_coeff      * * coul/shield/intra 0.5
pair_coeff      * * lj/cut 0.0 1.0
pair_coeff      * * eam/fs Mendelev_Cu2_2012.eam.fs.real NULL NULL NULL NULL NULL NULL Cu
pair_coeff      3 7 lj/cut 0.10    1.80
pair_coeff      1 3 lj/cut 2.30605 2.01
pair_coeff      1 4 lj/cut 1.15    3.20
pair_coeff      1 6 lj/cut 0.30    2.05
pair_coeff      1 5 lj/cut 0.9224  1.853
pair_coeff      2 5 lj/cut 0.4612  2.0
pair_coeff      3 4 lj/cut 15.0    2.04
pair_coeff      4 4 lj/cut 0.0128  4.478
pair_coeff      4 6 lj/cut 0.0655  2.944
pair_coeff      6 6 lj/cut 0.335   1.409
pair_coeff      3 6 lj/cut 0.10    2.00
pair_coeff      4 5 lj/cut 0.10    2.60
pair_coeff      5 6 lj/cut 0.10    1.80
pair_coeff      1 7 lj/cut 1.153   1.83
pair_coeff      2 7 lj/cut 0.4612  2.0
pair_coeff      4 7 lj/cut 0.10    2.60
pair_coeff      6 7 lj/cut 0.10    1.80

bond_style      harmonic
angle_style     harmonic
bond_coeff      1 0.0 0.9572
angle_coeff     1 0.0 104.52
kspace_style    pppm/samqeq 1.0e-5
kspace_modify   gewald 0.30
neighbor        2.0 bin
neigh_modify    every 2 delay 4 check yes one 10000
fix             shk all shake 1.0e-4 50 0 b 1 a 1

fix             chg FQ qeq/sam 1 0.0 8.0 1.0e-5 cucell.param
fix_modify      chg shield gaussian
fix_modify      chg quartic watO 115.30 0.0 8 0.5
fix_modify      chg gself on width 0.5 types 7
fix_modify      chg energy yes
fix_modify      chg aspc 2 3

compute         Tw water temp
thermo          100
balance         1.0 rcb
fix             bal all balance 1000 1.05 rcb

velocity        mobile create 300.0 12345 mom yes rot yes dist gaussian loop geom
fix             intg mobile nve/limit 0.1
fix             lgv  mobile langevin 300.0 300.0 100.0 12345
fix             zmom mobile momentum 100 linear 0 0 1
timestep        0.25
group           elA  molecule 90001
group           elB  molecule 90002
compute         qA elA property/atom q
compute         qB elB property/atom q
compute         sA elA reduce sum c_qA
compute         sB elB reduce sum c_qB
variable        aqM atom abs(q)
compute         mxM metal reduce max v_aqM
compute         TM metal temp
compute         msdM metal msd
thermo_style    custom step pe c_Tw c_TM c_msdM[4] c_sA c_sB c_mxM
run             ${NB}
write_dump      metal custom metal_q.dump id mol z q modify sort id
