units metal
atom_style full
boundary p p p
lattice sc 3.1
region box block 0 8 0 8 0 8
create_box 2 box
mass 1 15.9994
mass 2 1.008
molecule h2o spcfq.mol
create_atoms 0 box mol h2o 12345
group fq type 1 2
set type 1 charge 0.0
set type 2 charge 0.0
pair_style hybrid/overlay lj/cut 12.0 coul/long 12.0 coul/shield/intra 12.0 all cbrt
pair_coeff 1 1 lj/cut 0.01275 3.144
pair_coeff 1 2 lj/cut 0.0 1.0
pair_coeff 2 2 lj/cut 0.0 1.0
pair_coeff * * coul/long
pair_coeff * * coul/shield/intra 1.11
kspace_style pppm/samqeq 1.0e-6
kspace_modify gewald 0.35 mesh 30 30 30
neighbor 2.0 bin
velocity all create 298 4928459 mom yes rot yes
timestep 0.001
fix chg fq qeq/sam 1 0.0 12.0 1.0e-7 spcfq_expt.param
fix_modify chg shield cbrt
fix_modify chg energy yes
fix integ all rigid/nvt/small molecule temp 298 298 0.1
variable aq atom abs(q)
compute qmax fq reduce max v_aq
thermo_style custom step temp pe c_qmax
thermo 200
run 3000
