# S8 tolerance scan (reconstruction of the Perlmutter in.s8): fixed geometry, run 0, one tolerance per call.
# -var start lattice : the shipped deck's starting lattice with recip_probes 16 (the 2026-08-07 scan)
# -var start npt     : an equilibrated NPT snapshot (npt.data) with the production pin recip_self 0.37933
variable tol   index 1.0e-5
variable start index lattice
units metal
atom_style full
boundary p p p
if "${start} == lattice" then &
  "lattice sc 3.1" &
  "region box block 0 8 0 8 0 8" &
  "create_box 2 box" &
  "mass 1 15.9994" &
  "mass 2 1.008" &
  "molecule h2o spcfq.mol" &
  "create_atoms 0 box mol h2o 12345" &
  "set type 1 charge -0.85" &
  "set type 2 charge 0.425" &
else &
  "read_data npt.data"
group fq type 1 2
pair_style hybrid/overlay lj/cut 10.0 coul/long 10.0 coul/shield/intra 5.0 all
pair_coeff 1 1 lj/cut 0.01275 3.144
pair_coeff 1 2 lj/cut 0.0 1.0
pair_coeff 2 2 lj/cut 0.0 1.0
pair_coeff * * coul/long
pair_coeff * * coul/shield/intra 1.11
kspace_style pppm/samqeq 1.0e-6
if "${start} == npt" then "kspace_modify gewald 0.33957131" "kspace_modify mesh 36 36 36"
neighbor 2.0 bin
fix chg fq qeq/sam 1 0.0 10.0 ${tol} spcfq_expt.param
fix_modify chg solver cg nofallback
# npt start: pin the self-term AND the Ewald splitting and mesh that production tuned once at its run start
# (0.37933 belongs to g_ewald 0.33957131 on a 36^3 grid; a fresh run 0 on the NPT box retunes both)
if "${start} == lattice" then "fix_modify chg recip_probes 16" else "fix_modify chg recip_self 0.37933"
compute dip fq dipole/samqeq
thermo_style custom step pe c_dip
thermo_modify format float %.12g
run 0
print "S8 start=${start} tol=${tol} dipole=$(c_dip:%.9f)"
